# Исходные данные
l := 65
r_0 := 2.15
L_0 := 1.99*10^-3
C_0 := 5.44*10^-9
g_0 := 0.09*10^-6
f := 500
U_2 := 480
P_2 := 300
cosφ[2] := 0.7
φ_2 := acos(cosφ[2]) = 0.795399
j := sqrt(-1)
# Построение частотных характеристик
f_0 := 100, 110 .. 1000
Z_c(f_0) := sqrt((r_0 + j*2*π*f_0*L_0)/(g_0 + j*2*π*f_0*C_0))
z_c(f_0) := |Z_c(f_0)|
θ(f_0) := arg(Z_c(f_0))
γ(f_0) := sqrt((r_0 + j*2*π*f_0*L_0)*(g_0 + j*2*π*f_0*C_0))
α(f_0) := Re(γ(f_0))
β(f_0) := Im(γ(f_0))
υ_f(f_0) := 2*π*f_0/β(f_0)
λ(f_0) := 2*π/β(f_0)
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# Расчет характеристик линии на заданной частоте:
ω := 2*π*f = 3141.59
Z_с  := sqrt((r_0 + j*ω*L_0)/(g_0 + j*ω*C_0)) = 613.715 - 100.92i
z_c := |Z_с | = 621.957
θ := arg(Z_с ) = -0.162983
γ := sqrt((r_0 + j*ω*L_0)*(g_0 + j*ω*C_0)) = 0.00177999 + 0.0104795i
α := Re(γ) = 0.00177999
β := Im(γ) = 0.0104795
υ_f := ω/β = 299785
λ := 2*π/β = 599.571
# Расчет напряжений и токов в линии
ψU_2 := 0
ψI_2  := ψU_2 - φ_2 = -0.795399
# Ток в конце линии (действующее значение) | Напряжение и ток в конце линии (комплексы)
I_2 := P_2/(U_2*cosφ[2]) = 0.892857
U_2k := U_2*e^(j*ψU_2) = 480
I_2k := I_2*e^(j*ψI_2 ) = 0.625 - 0.637628i
# Распределение напряжений и токов по линии (комплексы)
U_k(x) := U_2k*cosh(γ*x) + I_2k*Z_с *sinh(γ*x)
I_k(x) := U_2k/Z_с *sinh(γ*x) + I_2k*cosh(γ*x)
# Распределение напряжений и токов по линии (действующие значения)
# Начальные фазы напряжений и токов в различных сечениях линии
U(x) := |U_k(x)|
I(x) := |I_k(x)|
ψU(x) := arg(U_k(x))
ψI(x) := arg(I_k(x))
# Напряжение и ток в начале линии (действующие значение)
U_1 := U(l) = 719.532
I_1 := I(l) = 0.526152
# Фазовый сдвиг между напряжением и током в различных сечениях линии:
# Фазовый сдвиг между напряжение и током в начале и конце линии
φ(x) := ψU(x) - ψI(x)
x := 0, 0.1*l .. l
φ_1 := φ(l) = 0.19855
φ_2 := φ(0) = 0.795399
# Графики распределения напряжений, токов и фазовых сдвигов между напряжениями и токами по координате (отсчитывается от начала линии)
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# Кпд линии | Сопротивление нагрузки (комплекс)
Z_2 := U_2/I_2*(cos(φ_2) + j*sin(φ_2)) = 376.32 + 383.923i
η := U_2*I_2*cos(φ_2)/(U_1*I_1*cos(φ_2))
# Входное сопротивление линии
Z_vh := Z_с *(Z_2 + Z_с *tanh(γ*l))/(Z_с  + Z_2*tanh(γ*l)) = 1340.67 + 269.744i
# Расчет согласованного режима работы линии
# Ток в конце линии (комплекс) | Ток в конце линии (действующие значение)
I_2ksogl := U_2k/Z_с  = 0.761529 + 0.125227i
I_2sogl := |I_2ksogl| = 0.771757
# Напряжение и ток в начале линии (комплекс) | Напряжение и ток в начале линии (действующее значение)
U_1ksogl := U_2k*e^(γ*l) = 418.62 + 339.33i
U_1sogl := |U_1ksogl| = 538.876
I_1ksogl := U_2k/Z_с *e^(γ*l) = 0.575621 + 0.647567i
I_1sogl := |I_1ksogl| = 0.866419
# Активная мощность, получаемая линией | Активная мощность, рассеиваемая нагрузкой
P_1sogl := U_2^2/z_c*e^(2*α*l)*cos(θ) = 460.705
P_2sogl := U_2^2/z_c*cos(θ) = 365.534
P_2sogl := U_2*I_2sogl*cos(θ) = 365.534
P_1sogl := U_1sogl*I_1sogl*cos(θ) = 460.705
# КПД линии
η_sogl := e^(-2*α*l) = 0.793423
η_sogl := U_2*I_2sogl*cos(θ)/(U_1sogl*I_1sogl*cos(θ)) = 0.793423
