# Исходные данные
l := 60
r_0 := 3.18
L_0 := 1.94*10^-3
C_0 := 8.4*10^-9
g_0 := 0.07*10^-6
f := 1000
U_2 := 280
P_2 := 200
cosφ[2] := 0.7
φ_2 := acos(cosφ[2]) = 0.795399
j := sqrt(-1)
# Построение частотных характеристик
f_0 := 100, 110 .. 1000
Z_c(f_0) := sqrt((r_0 + j*2*π*f_0*L_0)/(g_0 + j*2*π*f_0*C_0))
z_c(f_0) := |Z_c(f_0)|
θ(f_0) := arg(Z_c(f_0))
γ(f_0) := sqrt((r_0 + j*2*π*f_0*L_0)*(g_0 + j*2*π*f_0*C_0))
α(f_0) := Re(γ(f_0))
β(f_0) := Im(γ(f_0))
υ_f(f_0) := 2*π*f_0/β(f_0)
λ(f_0) := 2*π/β(f_0)
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# Расчет характеристик линии на заданной частоте:
ω := 2*π*f = 6283.19
Z_с  := sqrt((r_0 + j*ω*L_0)/(g_0 + j*ω*C_0)) = 484.62 - 61.8475i
z_c := |Z_с | = 488.551
θ := arg(Z_с ) = -0.126934
γ := sqrt((r_0 + j*ω*L_0)*(g_0 + j*ω*C_0)) = 0.00329816 + 0.0255733i
α := Re(γ) = 0.00329816
β := Im(γ) = 0.0255733
υ_f := ω/β = 245693
λ := 2*π/β = 245.693
# Расчет напряжений и токов в линии
ψU_2 := 0
ψI_2  := ψU_2 - φ_2 = -0.795399
# Ток в конце линии (действующее значение) | Напряжение и ток в конце линии (комплексы)
I_2 := P_2/(U_2*cosφ[2]) = 1.02041
U_2k := U_2*e^(j*ψU_2) = 280
I_2k := I_2*e^(j*ψI_2 ) = 0.714286 - 0.728717i
# Распределение напряжений и токов по линии (комплексы)
U_k(x) := U_2k*cosh(γ*x) + I_2k*Z_с *sinh(γ*x)
I_k(x) := U_2k/Z_с *sinh(γ*x) + I_2k*cosh(γ*x)
# Начальные фазы напряжений и токов в различных сечениях линии
# Распределение напряжений и токов по линии (действующие значения)
U(x) := |U_k(x)|
I(x) := |I_k(x)|
ψU(x) := arg(U_k(x))
ψI(x) := arg(I_k(x))
# Напряжение и ток в начале линии (действующие значения)
U_1 := U(l) = 551.003
I_1 := I(l) = 0.702373
# Фазовый сдвиг между напряжение и током в начале и конце линии
# Фазовый сдвиг между напряжением и током в различных сечениях линии:
φ(x) := ψU(x) - ψI(x)
x := 0, 0.1*l .. l
φ_1 := φ(l) = -0.714248
φ_2 := φ(0) = 0.795399
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# Графики  распределения  напряжений, токов и фазовых сдвигов между напряжениями и токами по координате (отсчитывается от начала линии)
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# КПД линии
# Сопротивление нагрузки (комплекс)
Z_2 := U_2/I_2*(cos(φ_2) + j*sin(φ_2)) = 192.08 + 195.961i
η := U_2*I_2*cos(φ_2)/(U_1*I_1*cos(φ_1)) = 0.683951
# Расчет согласованного режима работы линии :
# Ток в конце линии (комплекс) | Ток в конце линии (действующие значение) | Входное сопротивление линии
I_2kсогл := U_2k/Z_с  = 0.568512 + 0.0725538i
I_2согл := |I_2kсогл| = 0.573123
Z_вх := Z_с *(Z_2 + Z_с *tanh(γ*l))/(Z_с  + Z_2*tanh(γ*l)) = 592.748 - 513.878i
# Напряжение и ток в начале линии (комплекс) | Напряжение и ток в начале линии (действующее значение)
U_1kсогл := U_2k*e^(γ*l) = 12.4182 + 341.046i
U_1согл := |U_1kсогл| = 341.272
I_1kсогл := U_2k/Z_с *e^(γ*l) = -0.063158 + 0.695677i
I_1согл := |I_1kсогл| = 0.698539
# Активная мощность, получаемая линией | Активная мощность, рассеиваемая нагрузкой
P_1согл := U_2^2/z_c*e^(2*α*l)*cos(θ) = 236.473
P_2согл := U_2^2/z_c*cos(θ) = 159.183
P_1согл := U_1согл*I_1согл*cos(θ) = 236.473
P_2согл := U_2*I_2согл*cos(θ) = 159.183
# КПД линии
η_согл := e^(-2*α*l) = 0.673156
η_согл := U_2*I_2согл*cos(θ)/(U_1согл*I_1согл*cos(θ)) = 0.673156
